entry_price := 9622.79
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mark_price := 9579.96
wallet_balance := 0.420481
contracts := -10000
leverage := 100
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taker_fee := 0.075%
funding_rate := 0.01%
maintenance_rate := 0.5%
sign := contracts/abs(contracts) = -1
a := e^(1j*120 deg) = -0.5 + 0.866025i
entry_value := abs(contracts/entry_price) = 1.0392
a^2 = -0.5 - 0.866025i
mark_value := abs(contracts/mark_price) = 1.04385
a^3 = 1
upnl := sign*(entry_value - mark_value) = 4.64604*10^-3
entry_fee := entry_value*taker_fee = 0.7794*10^-3
position_margin := entry_value/leverage + entry_fee + upnl = 15.8174*10^-3
account_balance := wallet_balance - entry_fee = 0.419702
bankrupcy_value := account_balance + entry_value = 1.4589
maintenance_margin := maintenance_rate*entry_value = 0.005196
liquidation_fee := taker_fee*bankrupcy_value = 0.00109418
liquidation_price := contracts*entry_price/(entry_price*(account_balance - maintenance_margin - liquidation_fee) + contracts) = 15979.8
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9678
upnl := (1/9622.79 - 1/9646.02)*(-10000) = -2.50265*10^-3
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9681.5
upnl := (1/9622.79 - 1/9648.32)*(-5000) = -1.37489*10^-3
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9659
upnl := (1/9681.48 - 1/9649.0)*5000 = -1.73845*10^-3
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9663
upnl := (1/9677.73 - 1/9652.67)*6000 = -1.60958*10^-3
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upnl := (1/9663.0 - 1/9673.08)*(-1000) = -0.107841*10^-3
